// COMSOL Multiphysics 6.1.0.282 model "Simulation_periodic_control.mph"
// Outline of the model tree

Parameters
  L = 130[um]
  r = 100[nm]
  center_tether1 = 54.77[um]
  h_aux = 1[um]
  kappa = 1.19e-19[J]  // 1.9e-19[J]
  sigma_0 = 180[pN/um]
  r_tether_0 = sqrt(kappa/(2*sigma_0))
  delta_t = 0.005[s]
  t_end = 12[s]
  l_tether_0 = 1[um]
  l_tether_max = 11[um]
  t_ini_pull_tether1 = 2[s]
  t_end_pull_tether1 = t_ini_pull_tether1 + 5[s]
  v_pull = 40[um/s]
  t_slope = (l_tether_max - l_tether_0)/v_pull
  k = 3e-2[um^2]  // 3e-2[um^2] ; 3e-3[um^2]
  eta = 3e-3[pN*s/um]  // 3e-3[pN*s/um]
  E_m = 40[pN/um]  // 40[pN/um]
  A_tether_0 = 2*pi*r_tether_0*l_tether_0
  center_tether2 = center_tether1+ disp
  disp = 3[um]
  aux_x = 1/center_tether1
  k_inter = 190[nm]
  k_large = k*1.5
  k_small = (k - k_large/3)/(2/3)

Functions
  pw1: Piecewise
    funcname = v_t1
    arg = t
    smooth = contd2
    zonelengthtype = absolute
    smoothzone = 0.01
    smoothends = on
    pieces = 
      {0, t_ini_pull_tether1, 0}
      {t_ini_pull_tether1, t_ini_pull_tether1 + t_slope, v_pull}
      {t_ini_pull_tether1 + t_slope, t_end_pull_tether1, 0}
      {t_end_pull_tether1, t_end_pull_tether1 + t_slope, -v_pull}
      {t_end_pull_tether1 + t_slope, t_end, 0}
    argunit = s
    fununit = m/s
  pw2: Piecewise
    funcname = l_t1
    arg = t
    smooth = contd2
    zonelengthtype = absolute
    smoothzone = 0.01
    smoothends = on
    pieces = 
      {0, t_ini_pull_tether1, l_tether_0}
      {t_ini_pull_tether1, t_ini_pull_tether1 + t_slope, v_pull*(t-t_ini_pull_tether1)+l_tether_0}
      {t_ini_pull_tether1 + t_slope, t_end_pull_tether1, l_tether_max}
      {t_end_pull_tether1, t_end_pull_tether1 + t_slope, l_tether_max-v_pull*(t-t_end_pull_tether1)}
      {t_end_pull_tether1 + t_slope, t_end, l_tether_0}
    argunit = s
    fununit = m
  an1: Analytic | funcname = f_k; expr = 0.5*sign(sin(2*pi*x/k_inter)-0.5)+0.5; argunit = m
  an2: Analytic | funcname = f_k2; expr = -0.5*sign(sin(2*pi*x/k_inter)-0.5)+0.5; argunit = m
  an3: Analytic | funcname = f_k_periodic; expr = f_k(x)*k_large + f_k2(x)*k_small; fununit = m^2; argunit = m

Selections
  sel1: Explicit "Membrane" on boundaries 1-4, 7, 8, 12, 14, 17, 18, 22, 24
  sel2: Explicit "edge_tether1" on edges 16, 17, 22, 27

Couplings
  intop1: Integration on selection sel2

Geometry
  geom1 "Geometry 1" (3D, length unit µm)
    cyl1: Cylinder | pos = {0.01, 0, 0}; type = surface; axistype = x; r = r; h = L
    cyl2: Cylinder | pos = {center_tether1, cos(pi/2)*r, sin(pi/2)*r-0.01}; type = surface; r = r_tether_0; h = h_aux
    cyl3: Cylinder | pos = {center_tether2, cos(pi/2)*r, sin(pi/2)*r-0.01}; type = surface; r = r_tether_0; h = h_aux
    fin: Finalize "Form Union"

Physics
  sigma: CoefficientFormBoundaryPDE on selection sel1
    dependent variable sigma
    EquationForm.form = Automatic
    Units.DependentVariableQuantity = none
    Units.CustomDependentVariableUnit = pN/um
    Units.CustomSourceTermUnit = pN/um
    cfeq1: CoefficientFormPDE (default) | c = -f_k_periodic(x); f = rho; da = 0
    init1: init "Initial Values 1" (default) | sigma = sigma_0
  rho: CoefficientFormBoundaryPDE on selection sel1
    dependent variable rho
    EquationForm.form = Automatic
    Units.DependentVariableQuantity = none
    Units.CustomDependentVariableUnit = pN/um
    Units.CustomSourceTermUnit = pN/(um*s)
    cfeq1: CoefficientFormPDE (default) | c = 0; a = E_m/eta; f = d(sigma,t); da = 1
    init1: init "Initial Values 1" (default)
      rho = f_k_periodic(x)*(dtang(dtang(sigma_0,x),x)+dtang(dtang(sigma_0,y),y)+dtang(dtang(sigma_0,z),z))
    flux1: FluxBoundary "Flux/Source 1" on selection sel2 | g = -2*pi*sqrt(kappa/(2*sigma_t1))*(d(sigma_t1,t))
  Area: CoefficientFormEdgePDE on selection sel2
    dependent variable A_t1
    EquationForm.form = Automatic
    Units.DependentVariableQuantity = none
    Units.CustomDependentVariableUnit = um^2
    Units.CustomSourceTermUnit = um^2/s
    cfeq1: CoefficientFormPDE (default)
      c = 0
      f = f_k_periodic(x)*intop1(dtang(sigma,x)+dtang(sigma,y)+dtang(sigma,z))/eta
      da = 1
    init1: init "Initial Values 1" (default) | Area_t1 = A_tether_0
  tether1: CoefficientFormEdgePDE on selection sel2
    dependent variable sigma_t1
    EquationForm.form = Automatic
    Units.DependentVariableQuantity = none
    Units.CustomDependentVariableUnit = pN/um
    Units.CustomSourceTermUnit = pN/(um*s)
    cfeq1: CoefficientFormPDE (default) | c = 0; f = 4*pi^2*kappa*l_t1(t)*(v_t1(t)-l_t1(t)*d(A_t1,t)/A_t1)/A_t1^2; da = 1
    init1: init "Initial Values 1" (default) | sigma_t1 = sigma_0

Mesh
  mesh1 "Mesh 1"
    size: MeshSizeDefault | table = cfd; hauto = 4
    ftri1: FreeTri "Free Triangular 1" on selection sel1

Studies
  std1 "Study 1"
    time: Transient "Time Dependent" | tlist = range(0,delta_t,t_end); usertol = on; rtol = 0.001

Solver configurations
  sol1 "Solution 1" (study std1)
    v1: Variables "Dependent Variables 1"
    t1: Time "Time-Dependent Solver 1"
      tlist = range(0,delta_t,t_end)
      initialstepbdf = 0.00001
      maxstepconstraintbdf = const
      dDef: Direct
      se1: Segregated
        ssDef: SegregatedStep | segvar = {comp1_rho, comp1_sigma}; segvarspec = manual
        ss1: SegregatedStep | segvar = {comp1_A_t1}; segvarspec = manual
        ss2: SegregatedStep | segvar = {comp1_sigma_t1}; segvarspec = manual

Datasets
  dset1: Solution | solution = sol1
  an3_ds1: Grid1D
  an3_ds2: Grid1D
  an3_ds3: Grid1D

Plots
  pg1: PlotGroup3D "3D Plot Group 1" | data = dset1
    surf1: Surface | expr = f_k_periodic(x); unit = um^2
  pg2: PlotGroup3D "3D Plot Group 2" | data = dset1
    surf1: Surface | expr = sigma; unit = pN/um
  pg3: PlotGroup1D "1D Plot Group 3" | data = dset1
    ptgr1: PointGraph on points 10, 22 | expr = sigma; unit = pN/um
  pg4: PlotGroup1D "1D Plot Group 4" | data = an3_ds1; title = f_k_periodic(x) (m^2)
    plot1: Function | expr = comp1.f_k_periodic(x)
  pg5: PlotGroup1D "1D Plot Group 5" | data = an3_ds2; title = f_k_periodic(x) (m^2)
    plot1: Function | expr = comp1.f_k_periodic(x)
  pg6: PlotGroup1D "1D Plot Group 6" | data = an3_ds3; title = f_k_periodic(x) (m^2)
    plot1: Function | expr = comp1.f_k_periodic(x)

Exports
  plot1: Plot | filename = /Volumes/Seagate/AxonalTension/ComsolSept24/periodic_control_nov24_k03_Em60_x24.txt
  anim1: Animation
    giffilename = /Volumes/Seagate/AxonalTension/ComsolSept24/periodic_k_v3_movieb.gif
    avifilename = /Volumes/Seagate/AxonalTension/ComsolSept24/periodic_k_movie.avi
    maxframes = 482